*Heading
** Job name: Job-10 Model name: Model-1
** Generated by: Abaqus/CAE 2024
*Preprint, echo=NO, model=NO, history=NO, contact=NO
**
** PARTS
**
*Part, name=Part-1
*Node
      1,           1.,           0.
      2,           1.,           2.
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*Element, type=CPS8R
 1,   1,   7,  50,  32, 122, 123, 124, 125
 2,   7,   8,  51,  50, 126, 127, 128, 123
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*Nset, nset=_PickedSet2, internal, generate
   1,  341,    1
*Elset, elset=_PickedSet2, internal, generate
   1,  100,    1
** Section: Section-1
*Solid Section, elset=_PickedSet2, material=Material-1
0.01,
*End Part
**
**
** ASSEMBLY
**
*Assembly, name=Assembly
**
*Instance, name=Part-1-1, part=Part-1
*End Instance
**
*Node
      1,          1.5,           2.,           0.
*Nset, nset=_PickedSet7, internal
 1,
*Nset, nset=_PickedSet10, internal, instance=Part-1-1
   1,   2,   7,   8,   9,  10
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*Elset, elset=_PickedSet10, internal, instance=Part-1-1
  1,  2,  3,  4,  5,  6
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*Nset, nset=_PickedSet11, internal, instance=Part-1-1
 2,
*Nset, nset=_PickedSet12, internal, instance=Part-1-1
   1,   4,   5,  29,  30,  31
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*Elset, elset=_PickedSet12, internal, instance=Part-1-1
   1,  11,  21,  31,  41,  60,  70,  80,  90, 100
*Elset, elset=__PickedSurf5_S2, internal, instance=Part-1-1, generate
 10,  50,  10
*Elset, elset=__PickedSurf5_S4, internal, instance=Part-1-1, generate
 51,  91,  10
*Surface, type=ELEMENT, name=_PickedSurf5, internal
__PickedSurf5_S2, S2
__PickedSurf5_S4, S4
*Elset, elset=__PickedSurf8_S2, internal, instance=Part-1-1, generate
 10,  50,  10
*Elset, elset=__PickedSurf8_S4, internal, instance=Part-1-1, generate
 51,  91,  10
*Surface, type=ELEMENT, name=_PickedSurf8, internal
__PickedSurf8_S2, S2
__PickedSurf8_S4, S4
*Surface, type=NODE, name=_PickedSet7_CNS_, internal
_PickedSet7, 1.
** Constraint: Constraint-1
*Tie, name=Constraint-1, adjust=yes
_PickedSurf8, _PickedSet7_CNS_
*End Assembly
**
** MATERIALS
**
*Material, name=Material-1
*Elastic
 2e+08, 0.3
**
** BOUNDARY CONDITIONS
**
** Name: BC-2 Type: 对称/反对称/完全固定
*Boundary
_PickedSet10, XSYMM
** Name: BC-3 Type: 对称/反对称/完全固定
*Boundary
_PickedSet12, ENCASTRE
** ----------------------------------------------------------------
**
** STEP: Step-1
**
*Step, name=Step-1, nlgeom=NO
*Static
0.1, 1., 1e-05, 1.
**
** LOADS
**
** Name: Load-1   Type: Pressure
*Dsload
_PickedSurf5, P, 1000.
** Name: Load-2   Type: Concentrated force
*Cload
_PickedSet11, 2, -2000.
**
** OUTPUT REQUESTS
**
*Restart, write, frequency=0
**
** FIELD OUTPUT: F-Output-1
**
*Output, field, variable=PRESELECT
**
** HISTORY OUTPUT: H-Output-1
**
*Output, history, variable=PRESELECT
*End Step
